# Worksheet setting: ORIGIN = 1
ORIGIN := 1
i := 1, 2 .. 5
j := 1, 2 .. 5
xg := [1.1; 1.3; 1.6; 2.1; 2.2; 2.6; 2.9; 3]
n := length(xg) = 8
A[i, j] := sum(xg[k]^(i + j - 2), k = 1 .. n)
A = [
    8, 16.8, 38.88, 96.498, 251.173;
    16.8, 38.88, 96.498, 251.173, 675.112;
    38.88, 96.498, 251.173, 675.112, 1855.26;
    96.498, 251.173, 675.112, 1855.26, 5179.78;
    251.173, 675.112, 1855.26, 5179.78, 14632
]
yg := [2.1; 2.8; -4.4; 3.6; -8.7; 7.2; 7.6; 3.4]
B[i] := sum(yg[k]*xg[k]^(i - 1), k = 1 .. n)
B = [13.6; 38.29; 112.965; 335.33; 990.403]
solve block
    # guess values
    X := [1; 1; 1; 1; 1]
    # constraints
    A*X == B
    # solver
    Alp := find(X) = [-239.106; 594.508; -519.447; 189.081; -24.3302]
end solve block
F(x) := [1; x; x^2; x^3; x^4]
i := 1, 2 .. 8
P[i] := sum(Alp[j]*xg[i]^(j - 1), j = 1 .. 5)
P = [2.36612; 1.80931; -2.65393; -3.50079; -1.9306; 6.60351; 7.07843; 3.82795]
govno := linfit(xg, yg, F) = [-239.106; 594.508; -519.447; 189.081; -24.3302]
yres2[i] := sum(govno[j]*xg[i]^(j - 1), j = 1 .. 5) = [2.36612; 1.80931; -2.65393; -3.50079; -1.9306; 6.60351; 7.07843; 3.82795]
yres[i] := sum(Alp[j]*xg[i]^(j - 1), j = 1 .. 5) = [2.36612; 1.80931; -2.65393; -3.50079; -1.9306; 6.60351; 7.07843; 3.82795]
otkl[i] := (yres[i] - yg[i])^2
otkl2[i] := (yres2[i] - yg[i])^2
yres = [2.36612; 1.80931; -2.65393; -3.50079; -1.9306; 6.60351; 7.07843; 3.82795]
yg = [2.1; 2.8; -4.4; 3.6; -8.7; 7.2; 7.6; 3.4]
yres2 = [2.36612; 1.80931; -2.65393; -3.50079; -1.9306; 6.60351; 7.07843; 3.82795]
otkl = [0.0708183; 0.981468; 3.04875; 50.4212; 45.8248; 0.355795; 0.272038; 0.183144]
otkl2 = [0.0708183; 0.981468; 3.04875; 50.4212; 45.8248; 0.355795; 0.272038; 0.183144]
sumotck := sum(otkl[j], j = 1 .. 8) = 101.158
sumotck2 := sum(otkl2[j], j = 1 .. 8) = 101.158
B := linfit(xg, yg)  # error: Этой функции требуется как минимум {0} аргументов, но применяется она к {1}.
F
